New Capacitor.p13uc133 bus1=p13udt7722 phases=3 Kv=12.47 conn=Wye Kvar=450.0

New CapControl.p13uc133 Capacitor=p13uc133 Element=Line.padswitch(r:p13udt7722-p13udt7725)p13u_179944 Terminal=1 delay=100.0 Type=voltage Vmin=120.5 Vmax=125.0 Ptratio=59.99631547328862 Ctratio=100.0
